# OpenSim document version 20302
MarkerSet gait2392_Scale:
  Marker R.Acromium: torso (-0.0281 0.41645 0.199) fixed=true
  Marker L.Acromium: torso (-0.0281 0.41645 -0.199) fixed=true
  Marker Clav: torso (0.05 0.4 0) fixed=true
  Marker R.ASIS: pelvis (0.02 0.03 0.128) fixed=true
  Marker L.ASIS: pelvis (0.02 0.03 -0.128) fixed=true
  Marker R.PSIS: pelvis (-0.16 0.03 0.08) fixed=true
  Marker L.PSIS: pelvis (-0.16 0.03 -0.08) fixed=true
  Marker S2: pelvis (-0.16 0.02 0) fixed=true
  Marker R.TH1: femur_r (0.05 -0.2 0.064)
  Marker R.TH2: femur_r (-0.01 -0.2 0.064)
  Marker R.TH3: femur_r (-0.01 -0.3 0.06)
  Marker R.Knee: femur_r (0 -0.404 0.0625) fixed=true
  Marker R.MKnee: femur_r (0 -0.404 -0.0625) fixed=true
  Marker R.SH1: tibia_r (0.01 -0.12 0.05)
  Marker R.SH2: tibia_r (0.01 -0.22 0.05)
  Marker R.SH3: tibia_r (-0.05 -0.12 0.05)
  Marker R.SH4: tibia_r (-0.05 -0.22 0.05)
  Marker R.Ankle: tibia_r (-0.005 -0.41 0.053) fixed=true
  Marker R.MAnkle: tibia_r (0.006 -0.3888 -0.038) fixed=true
  Marker R.Heel: calcn_r (-0.02 0.02 0)
  Marker R.MT5: calcn_r (0.18 0 0.065)
  Marker R.MT1: calcn_r (0.18 0.005 -0.04)
  Marker L.TH1: femur_l (0.05 -0.2 -0.064)
  Marker L.TH3: femur_l (0.01 -0.2 -0.064)
  Marker L.TH4: femur_l (0.01 -0.3 -0.06)
  Marker L.TH2: femur_l (0.05 -0.3 -0.06)
  Marker L.Knee: femur_l (0 -0.404 -0.0625) fixed=true
  Marker L.MKnee: femur_l (0 -0.404 0.0625) fixed=true
  Marker L.SH1: tibia_l (0.01 -0.12 -0.05)
  Marker L.SH2: tibia_l (-0.05 -0.12 -0.05)
  Marker L.SH3: tibia_l (-0.05 -0.22 -0.05)
  Marker L.Ankle: tibia_l (-0.005 -0.41 -0.053) fixed=true
  Marker L.MAnkle: tibia_l (0.006 -0.3888 0.038) fixed=true
  Marker L.Heel: calcn_l (-0.02 0.02 0)
  Marker L.MT5: calcn_l (0.18 0 -0.065)
  Marker L.MT1: calcn_l (0.18 0.005 0.04)
  # Virtual Markers and Joint Centers
  Marker L.HJC: pelvis (-0.0707 -0.0661 -0.0835)
  Marker R.HJC: pelvis (-0.0707 -0.0661 0.0835)
  Marker Mid.ASIS: pelvis (0.02 0.025 0)
  Marker Mid.PSIS: pelvis (-0.16 0.03 0)
  Marker Mid.HJC: pelvis (-0.0707 -0.0661 0)
  Marker Mid.Pelvis: pelvis (-0.07 0.025 0)
  Marker L.KJC: femur_l (0 -0.404 0)
  Marker R.KJC: femur_r (0 -0.404 0)
  Marker L.AJC: tibia_l (0.0005 -0.3994 -0.0075)
  Marker R.AJC: tibia_r (0.0005 -0.3994 0.0075)
  Marker L.AJC_Floor: tibia_l (0.0005 -0.487 -0.0075)
  Marker R.AJC_Floor: tibia_r (0.0005 -0.487 0.0075)
  Marker L.Heel_Floor: calcn_l (-0.02 -0.015 0)
  Marker R.Heel_Floor: calcn_r (-0.02 -0.015 0)
  Marker L.MT1_Floor: calcn_l (0.18 -0.015 0.04)
  Marker R.MT1_Floor: calcn_r (0.18 -0.015 -0.04)
  Marker L.MT5_Floor: calcn_l (0.18 -0.015 -0.065)
  Marker R.MT5_Floor: calcn_r (0.18 -0.015 0.065)
  Marker L.MidMT_Floor: calcn_l (0.18 -0.015 -0.0125)
  Marker R.MidMT_Floor: calcn_r (0.18 -0.015 0.0125)
