# OpenSim document version 40000
CMCTool YA01_CMC:
  model_file: C:/Users/richa/Documents/OpenSim 4.0/Metabolix/exp/YA01/OpenSim/CMC/../RRA_Files/YA01_RRA_Adj.osim
  replace_force_set: false
  force_set_files: CMC_Actuators_70_locked_mtp_sub.xml
  results_directory: C:/Users/richa/Documents/OpenSim 4.0/Metabolix/exp/YA01/OpenSim/CMC
  output_precision: 8
  initial_time: 68
  final_time: 71.68
  solve_for_equilibrium_for_auxiliary_states: true
  maximum_number_of_integrator_steps: 20000
  maximum_integrator_step_size: 1
  minimum_integrator_step_size: 1e-8
  integrator_error_tolerance: 1e-5
  external_loads_file: YA01_ExternalLoads_Fm20_1.xml
  desired_kinematics_file: C:/Users/richa/Documents/OpenSim 4.0/Metabolix/exp/YA01/OpenSim/CMC/../IK_Files/Fm20_1_OpenSim_ik.mot
  task_set_file: CMC_Tasks_Locked.xml
  lowpass_cutoff_frequency: 12
  cmc_time_window: 0.01
  use_fast_optimization_target: true
  optimizer_algorithm: ipopt
  numerical_derivative_step_size: 0.0001
  optimization_convergence_tolerance: 0.0001
  optimizer_max_iterations: 1000
  optimizer_print_level: 0
  use_verbose_printing: false
  AnalysisSet Analyses:
    Kinematics: coordinates=all start_time=68 end_time=71.68 step_interval=10 in_degrees=true
    Actuation: start_time=68 end_time=71.68 step_interval=10 in_degrees=true
    ProbeReporter MetabolicsReporter
