# OpenSim document version 40000
AnalyzeTool:
  model_file: ../Data/Sub02/OpenSim/RRA_Files2/Sub02_RRA_AdjPost2.osim
  replace_force_set: false
  force_set_files: ../Data/Sub02/OpenSim/MA_Files/Sub02_CMC_Actuators_NoTorsoX.xml
  results_directory: ../Data/Sub02/OpenSim/MA_Files/A12_1_OpenSimAddTorso/Right_1
  output_precision: 8
  initial_time: 3.724
  final_time: 4.806
  solve_for_equilibrium_for_auxiliary_states: true
  maximum_number_of_integrator_steps: 20000
  maximum_integrator_step_size: 1
  minimum_integrator_step_size: 1e-8
  integrator_error_tolerance: 1e-5
  external_loads_file: ../Data/Sub02/OpenSim/RRA_Files2/Sub02_ExternalLoads_A12_1_OpenSim.xml
  coordinates_file: ../Data/Sub02/OpenSim/RRA_Files2/A12_1_OpenSimAddTorso/_Kinematics_q.sto
  lowpass_cutoff_frequency_for_coordinates: 12
  AnalysisSet Analyses:
    MuscleAnalysis: start_time=3.724 end_time=4.806 step_interval=1 in_degrees=true muscle_list=all
        moment_arm_coordinate_list=all compute_moments=false
  ControllerSet Controllers:
    ControlSetController: controls_file=../Data/Sub02/OpenSim/SO_Files/A12_1_OpenSimAddTorso/Right_1/_StaticOptimization_controls.xml
