# OpenSim document version 40000
# These weighting values are used from Schellenberg et al. 2017. https://doi.org/10.1080/10255842.2017.1295305
InverseKinematicsTool:
  results_directory: ./
  model_file: MODEL_FILE
  constraint_weight: Inf
  accuracy: 1e-5
  marker_file: C:\Users\richa\Documents\OpenSim 4.0\Metabolix\exp\YA01\OpenSim\Fm20_1_OpenSim.trc
  time_range: 0 10
  report_errors: true
  output_motion_file: .\Fm20_1_TEST_OpenSim_IK.mot
  report_marker_locations: true
  IKTaskSet:
    IKMarkerTask R.ASIS: apply=true weight=2
    IKMarkerTask L.ASIS: apply=true weight=2
    IKMarkerTask R.PSIS: apply=true weight=1
    IKMarkerTask L.PSIS: apply=true weight=1
    IKMarkerTask S2: apply=true weight=1
    IKMarkerTask R.TH1: apply=true weight=0.75
    IKMarkerTask R.TH2: apply=true weight=0.5
    IKMarkerTask R.TH3: apply=true weight=0.5
    IKMarkerTask R.Knee: apply=true weight=2
    IKMarkerTask R.MKnee: apply=false weight=2
    IKMarkerTask R.SH1: apply=true weight=0.75
    IKMarkerTask R.SH2: apply=true weight=0.75
    IKMarkerTask R.SH3: apply=true weight=0.5
    IKMarkerTask R.SH4: apply=true weight=0.5
    IKMarkerTask R.Ankle: apply=true weight=1
    IKMarkerTask R.MAnkle: apply=false weight=3
    IKMarkerTask R.Heel: apply=true weight=3
    IKMarkerTask R.MT5: apply=true weight=3
    IKMarkerTask R.MT1: apply=true weight=3
    IKMarkerTask L.TH1: apply=true weight=0.75
    IKMarkerTask L.TH2: apply=true weight=0.5
    IKMarkerTask L.TH3: apply=true weight=0.5
    IKMarkerTask L.Knee: apply=true weight=2
    IKMarkerTask L.MKnee: apply=false weight=2
    IKMarkerTask L.SH1: apply=true weight=0.75
    IKMarkerTask L.SH2: apply=true weight=0.75
    IKMarkerTask L.SH3: apply=true weight=0.5
    IKMarkerTask L.SH4: apply=true weight=0.5
    IKMarkerTask L.Ankle: apply=true weight=1
    IKMarkerTask L.MAnkle: apply=false weight=3
    IKMarkerTask L.Heel: apply=true weight=3
    IKMarkerTask L.MT5: apply=true weight=3
    IKMarkerTask L.MT1: apply=true weight=3
    IKMarkerTask L.Acr: apply=true weight=1
    IKMarkerTask R.Acr: apply=true weight=1
    IKMarkerTask Notch: apply=true weight=1
