# OpenSim document version 40000
AnalyzeTool YA01_SO:
  replace_force_set: false
  force_set_files: CMC_Actuators_70_locked_mtp_sub.xml
  results_directory: C:/Users/richa/Documents/OpenSim 4.0/Metabolix/exp/YA01/OpenSim/CMC
  output_precision: 8
  initial_time: 68
  final_time: 71.68
  solve_for_equilibrium_for_auxiliary_states: false
  maximum_number_of_integrator_steps: 20000
  maximum_integrator_step_size: 1
  minimum_integrator_step_size: 1e-8
  integrator_error_tolerance: 1e-5
  external_loads_file: YA01_ExternalLoads_Fm20_1.xml
  coordinates_file: RRA2_Kinematics_q.sto
  lowpass_cutoff_frequency_for_coordinates: -1
  AnalysisSet Analyses:
    StaticOptimization: start_time=68 end_time=71.68 step_interval=1 in_degrees=true use_model_force_set=true
        activation_exponent=3 use_muscle_physiology=true optimizer_convergence_criterion=0.0001
        optimizer_max_iterations=100
