# OpenSim document version 40000
ScaleTool subject01:
  mass: 67.6 [kg]
  height: 1650
  age: 99
  notes: This is an example setup file for scale.exe.
  GenericModelMaker:
    marker_set_file: gait2392_Scale_MarkerSet_ABL_Virtual.xml
  ModelScaler:
    apply: true
    scaling_order: measurements manualScale
    marker_file: C:\Users\richa\Documents\OpenSim 4.0\Metabolix\exp\YA01\OpenSim\Static_post1_nohjc_OpenSim_AddTorso.trc
    time_range: 0 2
    preserve_mass_distribution: true
    output_model_file: subject01_scaledOnly.osim
    output_scale_file: subject01_scaleSet_applied.xml
    MeasurementSet gait2392:
      Measurement pelvis: apply=true
        MarkerPair: markers=(midPSI midASI)
        BodyScale pelvis: axes=X
      Measurement pelvis: apply=true
        MarkerPair: markers=(midHJC midPelvis)
        BodyScale pelvis: axes=Y
      Measurement pelvis: apply=true
        MarkerPair: markers=(LASI RASI)
        BodyScale pelvis: axes=Z
      Measurement femur_r: apply=true
        MarkerPair: markers=(RKNEL RKNEM)
        BodyScale femur_r: axes=(X Z)
      Measurement femur_r: apply=true
        MarkerPair: markers=(RHJC RKJC)
        BodyScale femur_r: axes=Y
      Measurement tibia_r: apply=true
        MarkerPair: markers=(RANKL RANKM)
        BodyScale tibia_r: axes=(X Z)
      Measurement tibia_r: apply=true
        MarkerPair: markers=(RKJC RAJC)
        BodyScale tibia_r: axes=Y
      Measurement femur_l: apply=true
        MarkerPair: markers=(LKNEL LKNEM)
        BodyScale femur_l: axes=(X Z)
      Measurement femur_l: apply=true
        MarkerPair: markers=(LHJC LKJC)
        BodyScale femur_l: axes=Y
      Measurement tibia_l: apply=true
        MarkerPair: markers=(LANKL LANKM)
        BodyScale tibia_l: axes=(X Z)
      Measurement tibia_l: apply=true
        MarkerPair: markers=(LKJC LAJC)
        BodyScale tibia_l: axes=Y
      Measurement torso: apply=true
        MarkerPair: markers=(RSHO LSHO)
        BodyScale torso: axes=(X Z)
      Measurement torso: apply=true
        MarkerPair: markers=(NOTCH midASI)
        BodyScale torso: axes=Y
      Measurement talus_r: apply=true
        MarkerPair: markers=(RMT1 RMT5)
        BodyScale talus_r: axes=X
      Measurement talus_r: apply=true
        MarkerPair: markers=(RMT1 RMT5)
        BodyScale talus_r: axes=Y
      Measurement talus_r: apply=true
        MarkerPair: markers=(RMT1 RMT5)
        BodyScale talus_r: axes=Z
      Measurement calcn_r: apply=true
        MarkerPair: markers=(RMT1 RMT5)
        BodyScale calcn_r: axes=X
      Measurement calcn_r: apply=true
        MarkerPair: markers=(RMT1 RMT5)
        BodyScale calcn_r: axes=Y
      Measurement calcn_r: apply=true
        MarkerPair: markers=(RMT1 RMT5)
        BodyScale calcn_r: axes=Z
      Measurement toes_r: apply=true
        MarkerPair: markers=(RMT1 RMT5)
        BodyScale toes_r: axes=X
      Measurement toes_r: apply=true
        MarkerPair: markers=(RMT1 RMT5)
        BodyScale toes_r: axes=Y
      Measurement toes_r: apply=true
        MarkerPair: markers=(RMT1 RMT5)
        BodyScale toes_r: axes=Z
      Measurement talus_l: apply=true
        MarkerPair: markers=(LMT1 LMT5)
        BodyScale talus_l: axes=X
      Measurement talus_l: apply=true
        MarkerPair: markers=(LMT1 LMT5)
        BodyScale talus_l: axes=Y
      Measurement talus_l: apply=true
        MarkerPair: markers=(LMT1 LMT5)
        BodyScale talus_l: axes=Z
      Measurement calcn_l: apply=true
        MarkerPair: markers=(LMT1 LMT5)
        BodyScale calcn_l: axes=X
      Measurement calcn_l: apply=true
        MarkerPair: markers=(LMT1 LMT5)
        BodyScale calcn_l: axes=Y
      Measurement calcn_l: apply=true
        MarkerPair: markers=(LMT1 LMT5)
        BodyScale calcn_l: axes=Z
      Measurement toes_l: apply=true
        MarkerPair: markers=(LMT1 LMT5)
        BodyScale toes_l: axes=X
      Measurement toes_l: apply=true
        MarkerPair: markers=(LMT1 LMT5)
        BodyScale toes_l: axes=Y
      Measurement toes_l: apply=true
        MarkerPair: markers=(LMT1 LMT5)
        BodyScale toes_l: axes=Z
    ScaleSet gait2392_Scale:
      Scale: scales=(1.14724 1.14724 1.14724) segment=femur_r apply=false
      Scale: scales=(0.988523 0.988523 0.988523) segment=tibia_r apply=false
      Scale: scales=(1 1 1) segment=talus_r apply=false
      Scale: scales=(1 1 1) segment=calcn_r apply=false
      Scale: scales=(1 1 1) segment=toes_r apply=false
      Scale: scales=(1.14724 1.14724 1.14724) segment=femur_l apply=false
      Scale: scales=(0.988523 0.988523 0.988523) segment=tibia_l apply=false
      Scale: scales=(1 1 1) segment=talus_l apply=false
      Scale: scales=(1 1 1) segment=calcn_l apply=false
      Scale: scales=(1 1 1) segment=toes_l apply=false
  MarkerPlacer:
    apply: true
    marker_file: C:\Users\richa\Documents\OpenSim 4.0\Metabolix\exp\YA01\OpenSim\ScaleFiles\Static_post1_OpenSimAddTorsoVirtual.trc
    time_range: 0 1
    output_model_file: C:\Users\richa\Documents\OpenSim 4.0\Metabolix\exp\YA01\OpenSim\ScaleFiles\YA01_SCALED_new.osim
    max_marker_movement: 5
    IKTaskSet gait2392_Scale:
      IKMarkerTask R.Acr: apply=false weight=1
      IKMarkerTask L.Acr: apply=false weight=1
      IKMarkerTask Notch: apply=false weight=1
      IKMarkerTask R.ASIS: apply=true weight=2
      IKMarkerTask L.ASIS: apply=true weight=2
      IKMarkerTask R.PSIS: apply=true weight=2
      IKMarkerTask L.PSIS: apply=true weight=2
      IKMarkerTask S2: apply=true weight=2
      IKMarkerTask R.TH1: apply=false weight=5
      IKMarkerTask R.TH2: apply=false weight=5
      IKMarkerTask R.TH3: apply=false weight=5
      IKMarkerTask R.Knee: apply=true weight=3
      IKMarkerTask R.MKnee: apply=true weight=1
      IKMarkerTask R.SH1: apply=false weight=5
      IKMarkerTask R.SH2: apply=false weight=5
      IKMarkerTask R.SH3: apply=false weight=5
      IKMarkerTask R.SH4: apply=false weight=5
      IKMarkerTask R.Ankle: apply=true weight=3
      IKMarkerTask R.MAnkle: apply=true weight=1
      IKMarkerTask R.Heel: apply=true weight=3
      IKMarkerTask R.MT5: apply=true weight=5
      IKMarkerTask R.MT1: apply=true weight=5
      IKMarkerTask L.TH1: apply=false weight=5
      IKMarkerTask L.TH3: apply=false weight=5
      IKMarkerTask L.TH4: apply=false weight=5
      IKMarkerTask L.TH2: apply=false weight=5
      IKMarkerTask L.Knee: apply=true weight=3
      IKMarkerTask L.MKnee: apply=true weight=1
      IKMarkerTask L.SH1: apply=false weight=5
      IKMarkerTask L.SH2: apply=false weight=5
      IKMarkerTask L.SH3: apply=false weight=5
      IKMarkerTask L.Ankle: apply=true weight=3
      IKMarkerTask L.MAnkle: apply=true weight=1
      IKMarkerTask L.Heel: apply=true weight=3
      IKMarkerTask L.MT5: apply=true weight=5
      IKMarkerTask L.MT1: apply=true weight=5
