# OpenSim document version 20302
MarkerSet gait2392_Scale:
  Marker R.Acromium: torso (-0.0281 0.41645 0.199)
  Marker L.Acromium: torso (-0.0281 0.41645 -0.199)
  Marker Clav: torso (0.1 0.4 0)
  Marker R.ASIS: pelvis (0.02 0.03 0.128)
  Marker L.ASIS: pelvis (0.02 0.03 -0.128)
  Marker R.PSIS: pelvis (-0.16 0.03 0.08)
  Marker L.PSIS: pelvis (-0.16 0.03 -0.08)
  Marker S2: pelvis (-0.16 0.02 0)
  Marker R.TH1: femur_r (0.05 -0.2 0.064)
  Marker R.TH2: femur_r (-0.01 -0.2 0.064)
  Marker R.TH3: femur_r (-0.01 -0.3 0.06)
  Marker R.Knee: femur_r (0 -0.404 0.05)
  Marker R.MKnee: femur_r (0 -0.404 -0.05)
  Marker R.SH1: tibia_r (0.01 -0.12 0.05)
  Marker R.SH2: tibia_r (0.01 -0.22 0.05)
  Marker R.SH3: tibia_r (-0.05 -0.12 0.05)
  Marker R.SH4: tibia_r (-0.05 -0.22 0.05)
  Marker R.Ankle: tibia_r (-0.005 -0.41 0.053)
  Marker R.MAnkle: tibia_r (0.006 -0.3888 -0.038)
  Marker R.Heel: calcn_r (-0.02 0.02 0)
  Marker R.MT5: calcn_r (0.19 0 0.065)
  Marker R.MT1: calcn_r (0.19 0.005 -0.04)
  Marker L.TH1: femur_l (0.05 -0.2 -0.064)
  Marker L.TH3: femur_l (0.01 -0.2 -0.064)
  Marker L.TH4: femur_l (0.01 -0.3 -0.06)
  Marker L.TH2: femur_l (0.05 -0.3 -0.06)
  Marker L.Knee: femur_l (0 -0.404 -0.05)
  Marker L.MKnee: femur_l (0 -0.404 0.05)
  Marker L.SH1: tibia_l (0.01 -0.12 -0.05)
  Marker L.SH2: tibia_l (-0.05 -0.12 -0.05)
  Marker L.SH3: tibia_l (-0.05 -0.22 -0.05)
  Marker L.Ankle: tibia_l (-0.005 -0.41 -0.053)
  Marker L.MAnkle: tibia_l (0.006 -0.3888 0.038)
  Marker L.Heel: calcn_l (-0.02 0.02 0)
  Marker L.MT5: calcn_l (0.19 0 -0.065)
  Marker L.MT1: calcn_l (0.19 0.005 0.04)
