# OpenSim document version 20302
MarkerSet gait2392_Scale:
  Marker RSHO: torso (-0.0281 0.41645 0.199) fixed=true
  Marker LSHO: torso (-0.0281 0.41645 -0.199) fixed=true
  Marker NOTCH: torso (0.05 0.4 0) fixed=true
  Marker RASI: pelvis (0.02 0.03 0.128) fixed=true
  Marker LASI: pelvis (0.02 0.03 -0.128) fixed=true
  Marker RPSI: pelvis (-0.16 0.03 0.08) fixed=true
  Marker LPSI: pelvis (-0.16 0.03 -0.08) fixed=true
  Marker RTH1: femur_r (0.05 -0.2 0.064)
  Marker RTH2: femur_r (-0.01 -0.2 0.064)
  Marker RTH3: femur_r (-0.01 -0.3 0.06)
  Marker RKNEL: femur_r (0 -0.404 0.0625) fixed=true
  Marker RKNEM: femur_r (0 -0.404 -0.0625) fixed=true
  Marker RSH1: tibia_r (0.01 -0.12 0.05)
  Marker RSH2: tibia_r (0.01 -0.22 0.05)
  Marker RSH3: tibia_r (-0.05 -0.12 0.05)
  Marker RSH4: tibia_r (-0.05 -0.22 0.05)
  Marker RANKL: tibia_r (-0.005 -0.41 0.053) fixed=true
  Marker RANKM: tibia_r (0.006 -0.3888 -0.038) fixed=true
  Marker RHEE: calcn_r (-0.02 0.02 0) fixed=true
  Marker RMT5: calcn_r (0.18 0 0.065) fixed=true
  Marker RMT1: calcn_r (0.18 0.005 -0.04) fixed=true
  Marker LTH1: femur_l (0.05 -0.2 -0.064)
  Marker LTH3: femur_l (0.01 -0.2 -0.064)
  Marker LTH4: femur_l (0.01 -0.3 -0.06)
  Marker LTH2: femur_l (0.05 -0.3 -0.06)
  Marker LKNEL: femur_l (0 -0.404 -0.0625) fixed=true
  Marker LKNEM: femur_l (0 -0.404 0.0625) fixed=true
  Marker LSH1: tibia_l (0.01 -0.12 -0.05)
  Marker LSH2: tibia_l (-0.05 -0.12 -0.05)
  Marker LSH3: tibia_l (-0.05 -0.22 -0.05)
  Marker LANKL: tibia_l (-0.005 -0.41 -0.053) fixed=true
  Marker LANKM: tibia_l (0.006 -0.3888 0.038) fixed=true
  Marker LHEE: calcn_l (-0.02 0.02 0) fixed=true
  Marker LMT5: calcn_l (0.18 0 -0.065) fixed=true
  Marker LMT1: calcn_l (0.18 0.005 0.04) fixed=true
  # Virtual Markers and Joint Centers
  Marker L.HJC: pelvis (-0.0707 -0.0661 -0.0835)
  Marker R.HJC: pelvis (-0.0707 -0.0661 0.0835)
  Marker Mid.ASIS: pelvis (0.02 0.025 0)
  Marker Mid.PSIS: pelvis (-0.16 0.03 0)
  Marker Mid.HJC: pelvis (-0.0707 -0.0661 0)
  Marker Mid.Pelvis: pelvis (-0.07 0.025 0)
  Marker L.KJC: femur_l (0 -0.404 0)
  Marker R.KJC: femur_r (0 -0.404 0)
  Marker L.AJC: tibia_l (0.0005 -0.3994 -0.0075)
  Marker R.AJC: tibia_r (0.0005 -0.3994 0.0075)
